// COMSOL Multiphysics 4.1 (Build: 88) model "Off_center.mph"
// Outline of the model tree

Parameters
  L = 240
  alpha = 50
  R = L/alpha
  K_0 = 1
  K_com = K_0/(2*pi*R)
  M = 1.736*10^-4
  phi_0 = 0.4
  point_x = 4
  point_y = 4
  off_x = point_x*L/50
  off_y = point_y*L/50

Variables
  iexpr2 "Variables 2"
  iexpr6 "Variables 6"

Selections
  poeq_dst_pc1 "Selection 1"

Geometry
  geom1 "Geometry 1" (2D, length unit m)
    sq1: Square | pos = {0, 0}; base = corner; size = L
    c1: Circle | pos = {0.5*L+off_x, 0.5*L+off_y}; base = center; r = R
    dif1: Difference | input = sq1; input2 = c1, c10, c11, c12, c13, c14, c15, c16, c17, c2, c3, c4, c5, c6, c7, c8, c9
    fin: Finalize "Form Union"

Physics
  poeq: PoissonEquation "PDE"
    dependent variable u
    peq1: PoissonEquation "Poisson's Equation 1" | f = -M*u/(u+phi_0)*0
    zflx1: ZeroFluxBoundary "Zero Flux 1"
    init1: init "Initial Values 1"
    dir1: DirichletBoundary "Dirichlet Boundary Condition 1" | r = 0.2
    flux2: FluxBoundary "Flux/Source 2" | g = K_com; q = K_com
    pc1: PeriodicCondition

Mesh
  mesh1 "Mesh 1" (physics-controlled)
    size: MeshSizeDefault | hauto = 3

Studies
  std1 "Study 1"
    stat: Stationary

Solver configurations
  sol1 "Solver 1" (study std1)
    v1: Variables "Dependent Variables 1"
    s1: Stationary "Stationary Solver 1"
      dDef: Direct
      fc1: FullyCoupled

Datasets
  dset1: Solution | solution = sol1

Derived values
  int1: IntLine "Line Integration 1" | data = dset1; table = tbl1; expr = poeq.g_u

Tables
  tbl1: Table
    // Line Integration 1 (poeq.g_u)
    Boundary flux/source | Boundary flux/source | Boundary flux/source | Boundary flux/source | Boundary flux/source | Boundary flux/source | Boundary flux/source | Boundary flux/source | Boundary flux/source | Boundary flux/source | Boundary flux/source | Boundary flux/source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
    0.437024 | 0.432265 | 0.427606 | 0.423043 | 0.418569 | 0.437024 | 0.432265 | 0.427607 | 0.423043 | 0.418569 | 0.437024 | 0.432265

Plots
  pg1: PlotGroup2D "2D Plot Group 1" | data = dset1
    surf1: Surface | expr = u